<?xml version="1.0"?>
<?xml-stylesheet type="text/xsl" href="http://jsbsim.sourceforge.net/JSBSim.xsl"?>
<fdm_config name="Convair B-58A Hustler" version="2.0" release="ALPHA"
   xmlns:xsi="http://www.w3.org/2001/XMLSchema-instance"
   xsi:noNamespaceSchemaLocation="http://jsbsim.sourceforge.net/JSBSim.xsd">

 <fileheader>
  <author> Aeromatic v 0.91 </author>
  <filecreationdate> 2010-07-31 </filecreationdate>
  <version>$Revision: 1.10 $</version>
  <description>Models a Convair B-58A Hustler</description>
 </fileheader>

<!--
  File:     Convair B-58A Hustler.xml
  Inputs:
    name:          Convair B-58A Hustler
    type:          four-engine transonic transport
    max weight:    176890 lb
    wing span:     56.75 ft
    length:        96.83 ft
    wing area:     1542 sq-ft
    gear type:     tricycle
    retractable?:  yes
    # engines:     4
    engine type:   turbine
    engine layout: wings
    yaw damper?    yes
  Outputs:
    wing loading:  44 lb/sq-ft
    CL-alpha:      4.4 per radian
    CL-0:          0.0068
    CL-max:        1.2
    CD-0:          0.017
    K:             0.042
-->

 <metrics>
   <wingarea  unit="FT2">1542.00</wingarea>
   <wingspan  unit="FT" >56.75</wingspan>
   <wing_incidence>3</wing_incidence>
   <chord     unit="FT" >27.17</chord>
   <htailarea unit="FT2">385.50</htailarea>
   <htailarm  unit="FT" >43.57</htailarm>
   <vtailarea unit="FT2">308.40</vtailarea>
   <vtailarm  unit="FT" >43.57</vtailarm>
   <location name="AERORP" unit="IN">
     <x> 639.08 </x>
     <y>0.00</y>
     <z>0.00</z>
   </location>
   <location name="EYEPOINT" unit="IN">
     <x>  81.34 </x>
     <y> -32.00 </y>
     <z>  80.00 </z>
   </location>
   <location name="VRP" unit="IN">
     <x>0</x>
     <y>0</y>
     <z>0</z>
   </location>
 </metrics>

 <mass_balance>
   <ixx unit="SLUG*FT2">250412</ixx>
   <iyy unit="SLUG*FT2">823002</iyy>
   <izz unit="SLUG*FT2">989072</izz>
   <emptywt unit="LBS" >58000</emptywt>
   <location name="CG" unit="IN">
     <x>595</x><!--mean aerodynamic chord-->
     <y>0</y>
     <z>0</z>
   </location>

<pointmass name="pod"><!--empty pod-->
	<weight unit="LBS">8550</weight>
	<location name="POINTMASS" unit="IN">
		<x>498</x>
		<y>0</y>
		<z>-53</z>
	</location>
</pointmass>

 </mass_balance>

 <ground_reactions>

  <contact type="BOGEY" name="NOSE">
   <location unit="IN">
     <x>175</x>
     <y>0.00</y>
     <z>-108</z>
   </location>
   <static_friction>0.80</static_friction>
   <dynamic_friction>0.50</dynamic_friction>
   <rolling_friction>0.02</rolling_friction>
   <spring_coeff unit="LBS/FT">48900</spring_coeff>
   <damping_coeff unit="LBS/FT/SEC">16300</damping_coeff>
   <max_steer unit="DEG">50.0</max_steer>
   <brake_group>NONE</brake_group>
   <retractable>1</retractable>
 </contact>

  <contact type="BOGEY" name="LEFT_MAIN">
   <location unit="IN">
     <x>628</x>
     <y>-79</y>
     <z>-106</z>
   </location>
   <static_friction>0.80</static_friction>
   <dynamic_friction>0.50</dynamic_friction>
   <rolling_friction>0.02</rolling_friction>
   <spring_coeff unit="LBS/FT">163000</spring_coeff>
   <damping_coeff unit="LBS/FT/SEC">32600</damping_coeff>
   <max_steer unit="DEG">0</max_steer>
   <brake_group>LEFT</brake_group>
   <retractable>1</retractable>
 </contact>

  <contact type="BOGEY" name="RIGHT_MAIN">
   <location unit="IN">
     <x>628</x>
     <y>79</y>
     <z>-106</z>
   </location>
   <static_friction>0.80</static_friction>
   <dynamic_friction>0.50</dynamic_friction>
   <rolling_friction>0.02</rolling_friction>
   <spring_coeff unit="LBS/FT">163000</spring_coeff>
   <damping_coeff unit="LBS/FT/SEC">32600</damping_coeff>
   <max_steer unit="DEG">0</max_steer>
   <brake_group>RIGHT</brake_group>
   <retractable>1</retractable>
 </contact>

  <contact type="STRUCTURE" name="LEFT_WING">
    <location unit="IN">
     <x> 639.08 </x>
     <y> -28.38 </y>
     <z> -29.05 </z>
    </location>
    <static_friction>  0.80 </static_friction>
    <dynamic_friction> 0.50 </dynamic_friction>
    <spring_coeff unit="LBS/FT">      176890.00 </spring_coeff>
    <damping_coeff unit="LBS/FT/SEC"> 35378.00 </damping_coeff>
 </contact>

  <contact type="STRUCTURE" name="RIGHT_WING">
    <location unit="IN">
     <x> 639.08 </x>
     <y>  28.38 </y>
     <z> -29.05 </z>
    </location>
    <static_friction>  0.80 </static_friction>
    <dynamic_friction> 0.50 </dynamic_friction>
    <spring_coeff unit="LBS/FT">      176890.00 </spring_coeff>
    <damping_coeff unit="LBS/FT/SEC"> 35378.00 </damping_coeff>
 </contact>

 </ground_reactions>

 <propulsion>

   <engine file="J79-GE-5C">
    <location unit="IN">
      <x>752</x>
      <y>-201</y>
      <z>-24</z>
    </location>
    <orient unit="DEG">
      <pitch>0</pitch>
      <roll>0</roll>
      <yaw>0</yaw>
    </orient>
    <feed>0</feed>
    <feed>1</feed>
    <feed>2</feed>
    <feed>4</feed>
    <feed>5</feed>
    <thruster file="direct">
     <location unit="IN">
       <x>892</x>
       <y>-201</y>
       <z>-16</z>
     </location>
     <orient unit="DEG">
       <pitch>0</pitch>
       <roll>0</roll>
       <yaw>0</yaw>
     </orient>
    </thruster>
  </engine>

   <engine file="J79-GE-5C">
    <location unit="IN">
      <x>490</x>
      <y>-156</y>
      <z>-48</z>
    </location>
    <orient unit="DEG">
      <pitch>0</pitch>
      <roll>0</roll>
      <yaw>0</yaw>
    </orient>
    <feed>0</feed>
    <feed>1</feed>
    <feed>2</feed>
    <feed>4</feed>
    <feed>5</feed>
    <thruster file="direct">
     <location unit="IN">
       <x>630</x>
       <y>-156</y>
       <z>-39</z>
     </location>
     <orient unit="DEG">
       <pitch>0</pitch>
       <roll>0</roll>
       <yaw>0</yaw>
     </orient>
    </thruster>
  </engine>

   <engine file="J79-GE-5C">
    <location unit="IN">
      <x>490</x>
      <y>156</y>
      <z>-48</z>
    </location>
    <orient unit="DEG">
      <pitch>0</pitch>
      <roll>0</roll>
      <yaw>0</yaw>
    </orient>
    <feed>0</feed>
    <feed>1</feed>
    <feed>2</feed>
    <feed>4</feed>
    <feed>5</feed>
    <thruster file="direct">
     <location unit="IN">
       <x>630</x>
       <y>156</y>
       <z>-39</z>
     </location>
     <orient unit="DEG">
       <pitch>0</pitch>
       <roll>0</roll>
       <yaw>0</yaw>
     </orient>
    </thruster>
  </engine>

   <engine file="J79-GE-5C">
    <location unit="IN">
      <x>752</x>
      <y>201</y>
      <z>-24</z>
    </location>
    <orient unit="DEG">
      <pitch>0</pitch>
      <roll>0</roll>
      <yaw>0</yaw>
    </orient>
    <feed>0</feed>
    <feed>1</feed>
    <feed>2</feed>
    <feed>4</feed>
    <feed>5</feed>
    <thruster file="direct">
     <location unit="IN">
       <x>892</x>
       <y>201</y>
       <z>-16</z>
     </location>
     <orient unit="DEG">
       <pitch>0</pitch>
       <roll>0</roll>
       <yaw>0</yaw>
     </orient>
    </thruster>
  </engine>

  <tank type="FUEL" number="0"><!--forward tank-->
     <location unit="IN">
     <x>549</x>
     <y>0</y>
     <z>13</z>
     </location>
     <capacity unit="LBS">20620</capacity>
     <contents unit="LBS">6600</contents>
	<type>JP-4</type>
  </tank>

  <tank type="FUEL" number="1"><!--reservoir tank-->
     <location unit="IN">
     <x>572</x>
     <y>0</y>
     <z>27</z>
     </location>
     <capacity unit="LBS">3945</capacity>
     <contents unit="LBS">1200</contents>
	<type>JP-4</type>
  </tank>

  <tank type="FUEL" number="2"><!--aft tank-->
     <location unit="IN">
     <x>727</x>
     <y>0</y>
     <z>26</z>
     </location>
     <capacity unit="LBS">38000</capacity>
     <contents unit="LBS">11500</contents>
	<type>JP-4</type>
  </tank>

  <tank type="FUEL" number="3"><!--balance tank-->
     <location unit="IN">
     <x>903</x>
     <y>0</y>
     <z>37</z>
     </location>
     <capacity unit="LBS">7839</capacity>
     <contents unit="LBS">0</contents>
	<type>JP-4</type>
  </tank>

  <tank type="FUEL" number="4"><!--pod, forward tank-->
     <location unit="IN">
     <x>358</x>
     <y>0</y>
     <z>-53</z>
     </location>
     <capacity unit="LBS">20620</capacity>
     <contents unit="LBS">6300</contents>
	<type>JP-4</type>
  </tank>

  <tank type="FUEL" number="5"><!--pod, aft tank-->
     <location unit="IN">
     <x>604</x>
     <y>0</y>
     <z>-53</z>
     </location>
     <capacity unit="LBS">14585</capacity>
     <contents unit="LBS">4400</contents>
	<type>JP-4</type>
  </tank>

 </propulsion>

 <system file="anticollision"/>
 <system file="drag-chute"/>
 <system file="elevator-limits"/>
 <system file="hatches"/>
 <system file="airspeeds"/>
 <system file="NWS"/>
 <system file="takeoff-trim"/>
 <system file="pod"/>
 <system file="view"/>

 <flight_control name="FCS: Convair B-58A Hustler">

	<channel name="throttles">

		<pure_gain>
			<input>fcs/throttle-cmd-norm[0]</input>
			<gain>2</gain>
			<output>fcs/throttle-pos-norm[0]</output>
		</pure_gain>

		<pure_gain>
			<input>fcs/throttle-cmd-norm[1]</input>
			<gain>2</gain>
			<output>fcs/throttle-pos-norm[1]</output>
		</pure_gain>

		<pure_gain>
			<input>fcs/throttle-cmd-norm[2]</input>
			<gain>2</gain>
			<output>fcs/throttle-pos-norm[2]</output>
		</pure_gain>

		<pure_gain>
			<input>fcs/throttle-cmd-norm[3]</input>
			<gain>2</gain>
			<output>fcs/throttle-pos-norm[3]</output>
		</pure_gain>

	</channel>

  <channel name="Pitch">

   <summer name="Pitch Trim Sum">
      <input>fcs/elevator-cmd-norm</input>
      <input>fcs/pitch-trim-cmd-norm</input>
      <clipto>
        <min>-1</min>
        <max>1</max>
      </clipto>
   </summer>

   <aerosurface_scale name="Elevator Control">
      <input>fcs/pitch-trim-sum</input>
      <range>
        <min>-0.35</min>
        <max>0.35</max>
      </range>
      <output>fcs/elevator-pos-rad</output>
   </aerosurface_scale>

   <aerosurface_scale name="Elevator Normalization">
      <input>fcs/elevator-pos-rad</input>
      <domain>
        <min>-0.35</min>
        <max>0.35</max>
      </domain>
      <range>
        <min>-1</min>
        <max>1</max>
      </range>
      <output>fcs/elevator-pos-norm</output>
   </aerosurface_scale>

  </channel>

  <channel name="Roll">
   <summer name="Roll Trim Sum">
      <input>fcs/aileron-cmd-norm</input>
      <input>fcs/roll-trim-cmd-norm</input>
      <clipto>
        <min>-1</min>
        <max>1</max>
      </clipto>
   </summer>

   <aerosurface_scale name="Left Aileron Control">
      <input>fcs/roll-trim-sum</input>
      <range>
        <min>-0.2618</min>
        <max>0.2618</max>
      </range>
      <output>fcs/left-aileron-pos-uncorr-rad</output>
   </aerosurface_scale>

	<pure_gain name="Left Aileron Correction">
	<input>fcs/left-aileron-pos-uncorr-rad</input>
		<gain>fcs/aileron-ratio</gain>
			<clipto>
				<min>-0.2618</min>
				<max>0.2618</max>
			</clipto>
	<output>fcs/left-aileron-pos-rad</output>
	</pure_gain>

   <aerosurface_scale name="Right Aileron Control">
      <input>fcs/roll-trim-sum</input>
      <range>
        <min>-0.2618</min>
        <max>0.2618</max>
      </range>
      <output>fcs/right-aileron-pos-uncorr-rad</output>
   </aerosurface_scale>

	<pure_gain name="Right Aileron Correction">
	<input>fcs/right-aileron-pos-uncorr-rad</input>
		<gain>fcs/aileron-ratio</gain>
			<clipto>
				<min>-0.2618</min>
				<max>0.2618</max>
			</clipto>
	<output>fcs/right-aileron-pos-rad</output>
	</pure_gain>

   <aerosurface_scale name="left aileron normalization">
      <input>fcs/left-aileron-pos-rad</input>
      <domain>
        <min>-0.2618</min>
        <max>0.2618</max>
      </domain>
      <range>
        <min>-1</min>
        <max>1</max>
      </range>
      <output>fcs/left-aileron-pos-norm</output>
   </aerosurface_scale>

   <aerosurface_scale name="right aileron normalization">
      <input>fcs/right-aileron-pos-rad</input>
      <domain>
        <min>-0.2618</min>
        <max>0.2618</max>
      </domain>
      <range>
        <min>-1</min>
        <max>1</max>
      </range>
      <output>fcs/right-aileron-pos-norm</output>
   </aerosurface_scale>

  </channel>

  <channel name="Yaw">
   <summer name="Rudder Command Sum">
      <input>fcs/rudder-cmd-norm</input>
      <input>fcs/yaw-trim-cmd-norm</input>
      <clipto>
        <min> -0.35 </min>
        <max>  0.35 </max>
      </clipto>
   </summer>

   <scheduled_gain name="Yaw Damper Rate">
      <input>velocities/r-aero-rad_sec</input>
      <table>
        <independentVar lookup="row">velocities/ve-kts</independentVar>
         <tableData>
            30     0.00
            60     2.00
         </tableData>
      </table>
   </scheduled_gain>

   <scheduled_gain name="Yaw Damper Beta">
      <input>aero/beta-rad</input>
      <table>
        <independentVar lookup="row">velocities/ve-kts</independentVar>
        <tableData>
           30     0.00
           60     0.00
        </tableData>
      </table>
   </scheduled_gain>

   <summer name="Yaw Damper Sum">
      <input>fcs/yaw-damper-beta</input>
      <input>fcs/yaw-damper-rate</input>
      <clipto>
        <min> -0.1 </min>
        <max>  0.1 </max>
      </clipto>
   </summer>

   <scheduled_gain name="Yaw Damper Final">
      <input>fcs/yaw-damper-sum</input>
      <table>
        <independentVar lookup="row">velocities/ve-kts</independentVar>
        <tableData>
           30         0.0
           31         1.0
        </tableData>
      </table>
   </scheduled_gain>

   <summer name="Rudder Sum">
      <input>fcs/rudder-command-sum</input>
      <input>fcs/yaw-damper-final</input>
      <clipto>
        <min>-1</min>
        <max>1</max>
      </clipto>
   </summer>

	<pure_gain>
		<input>fcs/rudder-sum</input>
		<gain>85.714286</gain>
		<output>fcs/rudder-pos-degrees</output>
	</pure_gain>

   <aerosurface_scale name="Rudder Control">
      <input>fcs/rudder-sum</input>
      <range>
        <min>-0.35</min>
        <max>0.35</max>
      </range>
      <output>fcs/rudder-pos-rad</output>
   </aerosurface_scale>

   <aerosurface_scale name="rudder normalization">
      <input>fcs/rudder-pos-rad</input>
      <domain>
        <min>-0.35</min>
        <max>0.35</max>
      </domain>
      <range>
        <min>-1</min>
        <max>1</max>
      </range>
      <output>fcs/rudder-pos-norm</output>
   </aerosurface_scale>

  </channel>

  <channel name="Landing Gear">
   <kinematic name="Gear Control">
     <input>gear/gear-cmd-norm</input>
     <traverse>
       <setting>
          <position>0</position>
          <time>0</time>
       </setting>
       <setting>
          <position>1</position>
          <time>10</time>
       </setting>
     </traverse>
     <output>gear/gear-pos-norm</output>
   </kinematic>

  </channel>

 </flight_control>

 <aerodynamics>

        <function name="aero/function/kCDge">
            <description>Change_in_drag_due_to_ground_effect</description>
            <product>
                  <table>
                      <independentVar>aero/h_b-mac-ft</independentVar>
                      <tableData>
                          0.0000	0.0480
                          0.1000	0.5150
                          0.1500	0.6290
                          0.2000	0.7090
                          0.3000	0.8150
                          0.4000	0.8820
                          0.5000	0.9280
                          0.6000	0.9620
                          0.7000	0.9880
                          0.8000	1.0000
                      </tableData>
                  </table>
            </product>
        </function>

        <function name="aero/function/kCLge">
            <description>Change_in_lift_due_to_ground_effect</description>
            <product>
                  <table>
                      <independentVar>aero/h_b-mac-ft</independentVar>
                      <tableData>
                          0.0000	1.2030
                          0.1000	1.1270
                          0.1500	1.0900
                          0.2000	1.0730
                          0.3000	1.0460
                          0.4000	1.0550
                          0.5000	1.0190
                          0.6000	1.0130
                          0.7000	1.0080
                          0.8000	1.0060
                          0.9000	1.0030
                          1.0000	1.0020
                          1.1000	1.0000
                      </tableData>
                  </table>
            </product>
        </function>

  <axis name="LIFT">

    <function name="aero/coefficient/CLalpha">
      <description>Lift_due_to_alpha</description>
      <product>
          <property>aero/qbar-psf</property>
          <property>metrics/Sw-sqft</property>
          <property>aero/function/kCLge</property>
          <table>
            <independentVar lookup="row">aero/alpha-rad</independentVar>
            <tableData>
				-0.30		-0.35
				0.00			0.000
				0.10			0.125
				0.255		0.550
				0.375		0.625
				0.50			0.650
				0.625		0.625
				0.745		0.550
				0.89			0.125
            </tableData>
          </table>
      </product>
    </function>

    <function name="aero/coefficient/CLalpha-pod">
      <description>Lift_due_to_pod_alpha</description>
      <product>
          <property>systems/pod/unreleased</property>
          <property>aero/qbar-psf</property>
          <property>metrics/Sw-sqft</property>
          <table>
            <independentVar lookup="row">aero/alpha-rad</independentVar>
            <tableData>
				0.00		0.000
				0.89		0.017
            </tableData>
          </table>
      </product>
    </function>

    <function name="aero/coefficient/CLde">
       <description>Lift_due_to_Elevator_Deflection</description>
       <product>
           <property>aero/qbar-psf</property>
           <property>metrics/Sw-sqft</property>
           <property>fcs/elevator-pos-rad</property>
           <value>0.2</value>
       </product>
    </function>

  </axis>

  <axis name="DRAG">

    <function name="aero/coefficient/CD0">
       <description>Drag_at_zero_lift</description>
       <product>
          <property>aero/qbar-psf</property>
          <property>metrics/Sw-sqft</property>
          <table>
            <independentVar lookup="row">aero/alpha-rad</independentVar>
            <tableData>
			-0.75		1.50
			-0.65		0.30
			-0.575		0.15
			-0.525		0.09
			-0.255		0.03
			 0.000		0.00
			 0.255		0.03
			 0.525		0.09
			 0.575		0.15
			 0.65		0.30
			 0.75		1.50
            </tableData>
          </table>
       </product>
    </function>

    <function name="aero/coefficient/CDi">
       <description>Induced_drag</description>
         <product>
           <property>aero/qbar-psf</property>
           <property>metrics/Sw-sqft</property>
           <property>aero/cl-squared</property>
           <property>aero/function/kCDge</property>
           <value>0.042</value>
           <!--value>0.01</value-->
         </product>
    </function>

    <function name="aero/coefficient/CDmach">
       <description>Drag_due_to_mach</description><!--estimates scaled from SOURCES: fig. 4, NACA Research Memorandum SL56G23, by Russell N. Hopko and William H. Kinard, 13 Jul 56,-->
		<!-- and p. 23, NACA Research Memorandum RM L53J21A, by James R. Hall, 5 Jan 54-->
        <product>
          <property>aero/qbar-psf</property>
          <property>metrics/Sw-sqft</property>
          <table>
            <independentVar lookup="row">velocities/mach</independentVar>
            <!--tableData>
                        0		.0000
                0.950		.0006
                0.975     	.0009
				0.980		.0012
                1.000		.0036
                1.015		.0048
                1.034		.0053
				1.050		.0054
				2.200		.0042
            </tableData-->
            <tableData>
                        0		.0000
                0.915		.0006
                0.940     	.0009
				0.945		.0012
                0.965		.0036
                0.980		.0048
                1.000		.0053
				1.015		.0054
				2.200		.0000
            </tableData>
          </table>
        </product>
    </function>

    <function name="aero/coefficient/CD0-pod">
      <description>Drag_due_to_pod_mach</description>
      <product>
          <property>systems/pod/unreleased</property>
          <property>aero/qbar-psf</property>
          <property>metrics/Sw-sqft</property>
          <table>
            <independentVar lookup="row">velocities/mach</independentVar>
            <tableData>
				  0000		0.0000
				 .9000		0.0009
				.9500		0.0012
				1.000		0.0021
				<!--2.200		0.0027-->
				2.200		0.0000
            </tableData>
          </table>
      </product>
    </function>

    <function name="aero/coefficient/CDgear">
       <description>Drag_due_to_gear</description>
         <product>
           <property>aero/qbar-psf</property>
           <property>metrics/Sw-sqft</property>
           <property>gear/gear-pos-norm</property>
           <value>0.011</value>
         </product>
    </function>

    <function name="aero/coefficient/CDbeta">
       <description>Drag_due_to_sideslip</description>
       <product>
          <property>aero/qbar-psf</property>
          <property>metrics/Sw-sqft</property>
          <table>
            <independentVar lookup="row">aero/beta-rad</independentVar>
            <tableData>
              -1.57       1.230
              -0.26    0.050
               0.00       0.000
               0.26    0.050
               1.57       1.230
            </tableData>
          </table>
       </product>
    </function>

    <function name="aero/coefficient/CDde">
       <description>Drag_due_to_Elevator_Deflection</description>
       <product>
           <property>aero/qbar-psf</property>
           <property>metrics/Sw-sqft</property>
           <abs><property>fcs/elevator-pos-norm</property></abs>
           <value>0.04</value>
       </product>
    </function>

    <function name="aero/coefficient/CDdc">
       <description>Drag_due_to_drag_chute</description>
         <product>
           <property>aero/qbar-psf</property>
           <property>metrics/Sw-sqft</property>
           <property>systems/drag-chute/unfurl-norm</property>
           <value>.45</value>
         </product>
    </function>

  </axis>

  <axis name="SIDE">

    <function name="aero/coefficient/CYb">
       <description>Side_force_due_to_beta</description>
       <product>
           <property>aero/qbar-psf</property>
           <property>metrics/Sw-sqft</property>
           <property>aero/beta-rad</property>
           <value>-1</value>
       </product>
    </function>

  </axis>

  <axis name="ROLL">

    <function name="aero/coefficient/Clb">
       <description>Roll_moment_due_to_beta</description>
       <product>
           <property>aero/qbar-psf</property>
           <property>metrics/Sw-sqft</property>
           <property>metrics/bw-ft</property>
           <property>aero/beta-rad</property>
           <value>-0.1</value>
       </product>
    </function>

    <function name="aero/coefficient/Clp">
       <description>Roll_moment_due_to_roll_rate</description>
       <product>
           <property>aero/qbar-psf</property>
           <property>metrics/Sw-sqft</property>
           <property>metrics/bw-ft</property>
           <property>aero/bi2vel</property>
           <property>velocities/p-aero-rad_sec</property>
           <value>-0.4</value>
       </product>
    </function>

    <function name="aero/coefficient/Clr">
       <description>Roll_moment_due_to_yaw_rate</description>
       <product>
           <property>aero/qbar-psf</property>
           <property>metrics/Sw-sqft</property>
           <property>metrics/bw-ft</property>
           <property>aero/bi2vel</property>
           <property>velocities/r-aero-rad_sec</property>
           <value>0.15</value>
       </product>
    </function>

    <function name="aero/coefficient/Clda">
       <description>Roll_moment_due_to_aileron</description>
       <product>
          <property>aero/qbar-psf</property>
          <property>metrics/Sw-sqft</property>
          <property>metrics/bw-ft</property>
          <property>fcs/left-aileron-pos-rad</property>
          <table>
            <independentVar lookup="row">velocities/mach</independentVar>
            <tableData>
              0.0    0.100
              2.0    0.033
            </tableData>
          </table>
       </product>
    </function>

    <function name="aero/coefficient/Cldr">
       <description>Roll_moment_due_to_rudder</description>
       <product>
           <property>aero/qbar-psf</property>
           <property>metrics/Sw-sqft</property>
           <property>metrics/bw-ft</property>
           <property>fcs/rudder-pos-rad</property>
           <value>0.01</value>
       </product>
    </function>

  </axis>

  <axis name="PITCH">

    <function name="aero/coefficient/Cmalpha">
       <description>Pitch_moment_due_to_alpha</description>
       <product>
           <property>aero/qbar-psf</property>
           <property>metrics/Sw-sqft</property>
           <property>metrics/cbarw-ft</property>
           <property>aero/alpha-rad</property>
           <value>-0.7</value>
       </product>
    </function>

    <function name="aero/coefficient/Cmde">
       <description>Pitch_moment_due_to_elevator</description>
       <product>
          <property>aero/qbar-psf</property>
          <property>metrics/Sw-sqft</property>
          <property>metrics/cbarw-ft</property>
          <property>fcs/elevator-pos-rad</property>
          <table>
            <independentVar lookup="row">velocities/mach</independentVar>
            <tableData>
              0.0     -1.300
              2.0     -0.325
            </tableData>
          </table>
       </product>
    </function>

    <function name="aero/coefficient/Cmq">
       <description>Pitch_moment_due_to_pitch_rate</description>
       <product>
           <property>aero/qbar-psf</property>
           <property>metrics/Sw-sqft</property>
           <property>metrics/cbarw-ft</property>
           <property>aero/ci2vel</property>
           <property>velocities/q-aero-rad_sec</property>
           <value>-21</value>
       </product>
    </function>

    <function name="aero/coefficient/Cmadot">
       <description>Pitch_moment_due_to_alpha_rate</description>
       <product>
           <property>aero/qbar-psf</property>
           <property>metrics/Sw-sqft</property>
           <property>metrics/cbarw-ft</property>
           <property>aero/ci2vel</property>
           <property>aero/alphadot-rad_sec</property>
           <value>-4</value>
       </product>
    </function>

  </axis>

  <axis name="YAW">

    <function name="aero/coefficient/Cnb">
       <description>Yaw_moment_due_to_beta</description>
       <product>
           <property>aero/qbar-psf</property>
           <property>metrics/Sw-sqft</property>
           <property>metrics/bw-ft</property>
           <property>aero/beta-rad</property>
           <value>0.12</value>
       </product>
    </function>

    <function name="aero/coefficient/Cnr">
       <description>Yaw_moment_due_to_yaw_rate</description>
       <product>
           <property>aero/qbar-psf</property>
           <property>metrics/Sw-sqft</property>
           <property>metrics/bw-ft</property>
           <property>aero/bi2vel</property>
           <property>velocities/r-aero-rad_sec</property>
           <value>-0.15</value>
       </product>
    </function>

    <function name="aero/coefficient/Cndr">
       <description>Yaw_moment_due_to_rudder</description>
       <product>
           <property>aero/qbar-psf</property>
           <property>metrics/Sw-sqft</property>
           <property>metrics/bw-ft</property>
           <property>fcs/rudder-pos-rad</property>
           <value>-0.1</value>
       </product>
    </function>

    <function name="aero/coefficient/Cnda">
       <description>Adverse_yaw</description>
       <product>
           <property>aero/qbar-psf</property>
           <property>metrics/Sw-sqft</property>
           <property>metrics/bw-ft</property>
           <property>fcs/left-aileron-pos-rad</property>
           <value>0</value>
       </product>
    </function>

  </axis>

 </aerodynamics>

</fdm_config>
